// COMSOL Multiphysics 6.3.0.420 model "TrapBuilder_v1a_stationary_2D_NewSTL_CLEAR.mph"
// Outline of the model tree
// Components: comp1 "Component 1", comp2 "Component 2", mcomp4 "Mailler le composant 4"

Geometry
  geom1 "Geometry 1" [comp1] (3D, length unit m)
    imp1: Import
      type = mesh
      filename = S:\120-LETI\120.4-DTIS\120.4.12-SEMIV\120.4.12.6-PRISM\120.4.12.6.4-Montages de projets\TUM - CEA Leti collab\Simulation\CEATUM_TrapBuilder_v1a_ChannelPositive.stl
      mesh = mpart4
      lengthunittype = mesh
      assemblycomponentstype = mesh
      virtualgeometrytype = mesh
      objectstoimporttype = mesh
      layerstype = mesh
      drillholestype = mesh
      componentsstype = mesh
      compattrtag = imp1.component
      cellstype = mesh
      arcrecognitiontype = mesh
      simplifytype = mesh
      meshimportassocmap = 
        {0, 0, 1, 1, 2, 2, 3, 3, 4, 4, 5, 5, 6, 6, 7, 7, 8, 8, 9, 9, 10, 10, 11, 11, 12, 12, 13, 13, 14, 14, 15, 15, 16, 16, 17, 17, 18, 18, 19, 19, 20, 20, 21, 21, 22, 22, 23, 23, 24, 24, 25, 25, 26, 26, 27, 27, 28, 28, 29, 29, 30, 30, 31, 31, 32, 32, 33, 33, 34, 34, 35, 35, 36, 36, 37, 37, 38, 38, 39, 39, 40, 40, 41, 41, 42, 42, 43, 43, 44, 44, 45, 45, 46, 46, 47, 47, 48, 48, 49, 49, 50, 50, 51, 51, 52, 52, 53, 53, 54, 54, 55, 55, 56, 56, 57, 57, 58, 58, 59, 59}
        {0, 0, 1, 1, 2, 2, 3, 3, 4, 4, 5, 5, 6, 6, 7, 7, 8, 8, 9, 9, 10, 10, 11, 11, 12, 12, 13, 13, 14, 14, 15, 15, 16, 16, 17, 17, 18, 18, 19, 19, 20, 20, 21, 21, 22, 22, 23, 23, 24, 24, 25, 25, 26, 26, 27, 27, 28, 28, 29, 29, 30, 30, 31, 31, 32, 32, 33, 33, 34, 34, 35, 35, 36, 36, 37, 37, 38, 38, 39, 39, 40, 40, 41, 41, 42, 42, 43, 43, 44, 44, 45, 45, 46, 46, 47, 47, 48, 48, 49, 49, 50, 50, 51, 51, 52, 52, 53, 53, 54, 54, 55, 55, 56, 56, 57, 57, 58, 58, 59, 59, 60, 60, 61, 61, 62, 62, 63, 63, 64, 64, 65, 65, 66, 66, 67, 67, 68, 68, 69, 69, 70, 70, 71, 71, 72, 72, 73, 73, 74, 74, 75, 75, 76, 76, 77,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}
        {0, 0, 1, 1, 2, 2, 3, 3, 4, 4, 5, 5, 6, 6, 7, 7, 8, 8, 9, 9, 10, 10, 11, 11, 12, 12, 13, 13, 14, 14, 15, 15, 16, 16, 17, 17, 18, 18, 19, 19, 20, 20, 21, 21, 22, 22, 23, 23, 24, 24, 25, 25, 26, 26, 27, 27, 28, 28, 29, 29, 30, 30, 31, 31}
        {1, 1}
      meshentityindexmap = 
        {0, 1, 2, 3, 4, 5, 6, 7, 8, 9, 10, 11, 12, 13, 14, 15, 16, 17, 18, 19, 20, 21, 22, 23, 24, 25, 26, 27, 28, 29, 30, 31, 32, 33, 34, 35, 36, 37, 38, 39, 40, 41, 42, 43, 44, 45, 46, 47, 48, 49, 50, 51, 52, 53, 54, 55, 56, 57, 58, 59}
        {0, 1, 2, 3, 4, 5, 6, 7, 8, 9, 10, 11, 12, 13, 14, 15, 16, 17, 18, 19, 20, 21, 22, 23, 24, 25, 26, 27, 28, 29, 30, 31, 32, 33, 34, 35, 36, 37, 38, 39, 40, 41, 42, 43, 44, 45, 46, 47, 48, 49, 50, 51, 52, 53, 54, 55, 56, 57, 58, 59, 60, 61, 62, 63, 64, 65, 66, 67, 68, 69, 70, 71, 72, 73, 74, 75, 76, 77, 78, 79, 80, 81, 82, 83, 84, 85, 86, 87, 88, 89}
        {0, 1, 2, 3, 4, 5, 6, 7, 8, 9, 10, 11, 12, 13, 14, 15, 16, 17, 18, 19, 20, 21, 22, 23, 24, 25, 26, 27, 28, 29, 30, 31}
        {1}
      selderived = on
    sca1: Scale | input = imp1; isotropic = 0.001; factor = 0.001
    wp1: WorkPlane | quicky = -0.0002; quickz = 0.0002; unite = on
    fin: Finalize "Form Union"
  geom2 "Geometry 2" [comp2] (2D, length unit m)
    cro1: CrossSection | workplane = wp1
    fin: Finalize "Form Union"
  mgeom4 "Mailler la géométrie 4" [mcomp4] (3D, length unit m)

Materials
  mat1: Common "Water" [comp2] on all domains
    def: def "Basic"
      thermalexpansioncoefficient = alpha_p(T)
      bulkviscosity = muB(T)
      dynamicviscosity = eta(T)
      ratioofspecificheat = gamma_w(T)
      electricconductivity = 5.5e-6[S/m]
      heatcapacity = Cp(T)
      density = rho(T)
      thermalconductivity = k(T)
      soundspeed = cs(T)
      eta: Piecewise
        arg = T
        pieces = 
          {273.15, 413.15, 1.3799566804-0.021224019151*T^1+1.3604562827E-4*T^2-4.6454090319E-7*T^3+8.9042735735E-10*T^4-9.0790692686E-13*T^5+3.8457331488E-16*T^6}
          {413.15, 553.75, 0.00401235783-2.10746715E-5*T^1+3.85772275E-8*T^2-2.39730284E-11*T^3}
        argunit = K
        fununit = Pa*s
      Cp: Piecewise | arg = T; pieces = {273.15, 553.75, 12010.1471-80.4072879*T^1+0.309866854*T^2-5.38186884E-4*T^3+3.62536437E-7*T^4}; argunit = K; fununit = J/(kg*K)
      rho: Piecewise
        arg = T
        smooth = contd1
        pieces = 
          {273.15, 293.15, 6.3092789034e-05*T^3-0.0603676398829*T^2+18.9229382407066*T-950.704055329848}
          {293.15, 373.15, 1.0335053319e-05*T^3-0.0133950656345*T^2+4.96928883266*T+432.257114008512}
        argunit = K
        fununit = kg/m^3
      k: Piecewise | arg = T; pieces = {273.15, 553.75, -0.869083936+0.00894880345*T^1-1.58366345E-5*T^2+7.97543259E-9*T^3}; argunit = K; fununit = W/(m*K)
      cs: Interpolation
        funcnametable = {cs, 1}
        table = {{273, 1403}, {278, 1427}, {283, 1447}, {293, 1481}, {303, 1507}, {313, 1526}, {323, 1541}, {333, 1552}, {343, 1555}, {353, 1555}, {363, 1550}, {373, 1543}}
        interp = piecewisecubic
        fununit = m/s
        argunit = K
      an1: Analytic | funcname = alpha_p; expr = -1/rho(T)*d(rho(T),T); args = T; fununit = 1/K; argunit = K
      an2: Analytic | funcname = gamma_w; expr = 1+(T/Cp(T))*(alpha_p(T)*cs(T))^2; args = T; fununit = 1; argunit = K
      an3: Analytic | funcname = muB; expr = 2.79*eta(T); args = T; fununit = Pa*s; argunit = K

Physics
  spf: LaminarFlow [geom2] on all domains
    dependent variable u = {u, v, w}
    PhysicalModelProperty.ShallowChannelProperty = 1
    PhysicalModelProperty.dz = 0.000400[m]
    fp1: FluidProperties (default)
    init1: init "Initial Values 1" (default)
    wallbc1: WallBC "Wall 1" (default) | BoundaryCondition = NoSlip
    inl1: InletBoundary "Inlet 1" on boundaries 1
      BoundaryCondition = FullyDevelopedFlow
      FullyDevelopedFlowOption = V0
      V0fdf = 1.67*10^-9
      Dzfdf = 0.000010
      MassFlowType = StandardFlowRate
      stdmfr = 1.66 [µl/s]
      Dbnd = 0.000356[m]
      Mn = 0.01801528[kg/mol]
    out1: OutletBoundary "Outlet 1" on boundaries 18

Mesh
  mesh1 "Mesh 1" [geom1] (physics-controlled)
  mesh2 "Mesh 2" [geom2] (physics-controlled)
    size: MeshSizeDefault | table = cfd; hauto = 2
  mpart4 "Pièce de maillage 4" [mgeom4]
    imp1: Import "Importer 1"
      source = stl
      filename = /home/jk270454/ComsolTumTrapBuilder/CEATUM_TrapBuilder_v1a_NewSTL.stl
      createdom = on
    fin: Finalize "Finalisation de la géométrie"

Studies
  std1 "Study 1"
    stat: Stationary | mesh = {geom1, nomesh, geom2, mesh2}

Solver configurations
  sol1 "Solution 1" (study std1)
    v1: Variables "Dependent Variables 1"
    s1: Stationary "Stationary Solver 1"
      fc1: FullyCoupled | linsolver = d1; initstep = 0.01; maxiter = 100
      d1: Direct "Direct, fluid flow variables (spf)" | linsolver = pardiso; pivotperturb = 1.0E-13

Datasets
  dset1: Solution | solution = sol1
  cln1: CutLine2D "Ligne de coupe 2D 1 (Trap)" | data = dset1; genpoints = {{0.0078, 0.0074}, {0.0078, 0.0076}}
  cln2: CutLine2D "Ligne de coupe 2D 2 (Channel)" | data = dset1; genpoints = {{0.0075, 0.0065}, {0.0085, 0.0065}}
  cln3: CutLine2D "Ligne de coupe 2D 3 (Total)" | data = dset1; genpoints = {{0.0075, 0.0085}, {0.0085, 0.0085}}
  cln4: CutLine2D "Ligne de coupe 2D 4 (Entrance)" | data = dset1; genpoints = {{0.0065, 0.009}, {0.0075, 0.009}}
  cln5: CutLine2D "Ligne de coupe 2D 5 (Curve)" | data = dset1; genpoints = {{0.0075, 0.0017}, {0.0075, 0.0023}}

Derived values
  int1: IntLine "Intégration sur ligne 1 (Qb)"
    data = cln1
    table = tbl1
    expr = u*0.000400*60*10^9
    unit = m^2/s
    descr = Qb
  int2: IntLine "Intégration sur ligne 2 (Qa)"
    data = cln2
    table = tbl1
    expr = v*0.000400*60*10^9
    unit = m^2/s
    descr = Qa
  int3: IntLine "Intégration sur ligne 3 (Qtot)"
    data = cln3
    table = tbl1
    expr = v*0.000400*60*10^9
    unit = m^2/s
    descr = Qtot
  int4: IntLine "Intégration sur ligne 4 (Qent)" | data = cln4; table = tbl1; expr = -v*0.000400*60*10^9; descr = Qent

Tables
  tbl1: Table "Table with flow rates (Qb, Qa, Qtot and Qent)"
    // Intégration sur lignes (Qb, Qa, Qtot and Qent)
    Qb (m^2/s) | Qa (m^2/s) | Qtot (m^2/s) | Qent (m^2/s)
    81.2298 | 18.3004 | 99.2636 | 99.2553

Plots
  pg1: PlotGroup2D "Velocity (spf)" | data = dset1
    surf1: Surface | expr = spf.U
  pg2: PlotGroup2D "Pressure (spf)" | data = dset1
    con1: Contour | expr = p; levelrounding = off

Exports
  data1: Data "TrapProfile"
    data = cln1
    expr = u
    filename = /home/jk270454/ComsolTumTrapBuilder/TrapProfile.txt
    includenan = off
  data2: Data "ChannelProfile"
    data = cln2
    expr = v
    filename = /home/jk270454/ComsolTumTrapBuilder/ChannelProfile.txt
    includenan = off
  data3: Data "TotalProfile"
    data = cln3
    expr = v
    filename = /home/jk270454/ComsolTumTrapBuilder/TotalProfile.txt
    includenan = off
  data4: Data "EntranceProfile"
    data = cln4
    expr = -v
    filename = /home/jk270454/ComsolTumTrapBuilder/EntranceProfile.txt
    includenan = off
  data5: Data "CurveProfile"
    data = cln5
    expr = u
    filename = /home/jk270454/ComsolTumTrapBuilder/CurveProfile.txt
    includenan = off