// COMSOL Multiphysics 6.3.0.420 model "SpheroidTrapDesigner_transient_model_v1a.mph"
// Outline of the model tree
// Components: comp1 "Component pour import stl", mcomp1 "Mesh Component 1", mcomp2 "Mesh Component 2", mcomp3 "Mesh Component 3", comp2 "Component 2", mcomp4 "Mesh Component 4", mcomp5 "Mesh Component 5"

Parameters
  mu_water = 0.0024[kg/(m*s)]  // viscosité dynamique de l'eau à 300K
  rho_water = 1[kg/m^3]  // densité de l'eau à 300K

Functions
  rm1: Ramp [comp2] | location = 0.05; slope = 100; smoothzoneloc = 0.005; smoothzonecutoff = 0; cutoff = 1

Selections
  sel1: Explicit "canal" [comp2] on domains 1, 2
  sel2: Explicit "spheroid" [comp2] on domains 5
  sel3: Explicit "liver" [comp2] on domains 3-5
  sel4: Explicit "entree" [comp2] on boundaries 14
  sel5: Explicit "sortie" [comp2] on boundaries 15
  sel6: Explicit "flux hors trap" [comp2] on boundaries 26
  sel7: Explicit "flux dans trap" [comp2] on no boundaries

Couplings
  intop1: Integration "Integration sur sortie" on selection sel5 | opname = int_out
  intop2: Integration "Integration sur trap" on selection sel7 | opname = int_trapin
  intop3: Integration "Integration hors trap" on selection sel6 | opname = int_trapout

Pairs
  p1: Contact "Paire de contact 1" | source: boundaries 27-30; destination: boundaries 10, 16, 18, 22, 39, 40

Common definitions
  free1: DeformingDomain [comp2] on domains 1 | stiffeningFactor = 100
  fix1: FixedBoundary [comp2] on boundaries 10, 16, 18, 22, 39, 40

Geometry
  geom1 "Geometry 1" [comp1] (3D, length unit m)
    imp1: Import
      type = mesh
      filename = C:\Users\PP170251\Documents\DTIS\Joris Kaal\simuls\simuls Pascale\2D refait\CEATUM_TrapBuilder_v1a_NewSTL.stl
      mesh = mpart5
      lengthunittype = mesh
      assemblycomponentstype = mesh
      virtualgeometrytype = mesh
      objectstoimporttype = mesh
      layerstype = mesh
      drillholestype = mesh
      componentsstype = mesh
      compattrtag = imp1.component
      cellstype = mesh
      arcrecognitiontype = mesh
      simplifytype = mesh
      meshimportassocmap = 
        {0, 0, 1, 1, 2, 2, 3, 3, 4, 4, 5, 5, 6, 6, 7, 7, 8, 8, 9, 9, 10, 10, 11, 11, 12, 12, 13, 13, 14, 14, 15, 15, 16, 16, 17, 17, 18, 18, 19, 19, 20, 20, 21, 21, 22, 22, 23, 23, 24, 24, 25, 25, 26, 26, 27, 27, 28, 28, 29, 29, 30, 30, 31, 31, 32, 32, 33, 33, 34, 34, 35, 35, 36, 36, 37, 37, 38, 38, 39, 39, 40, 40, 41, 41, 42, 42, 43, 43, 44, 44, 45, 45, 46, 46, 47, 47, 48, 48, 49, 49, 50, 50, 51, 51, 52, 52, 53, 53, 54, 54, 55, 55, 56, 56, 57, 57, 58, 58, 59, 59, 60, 60}
        {0, 0, 1, 1, 2, 2, 3, 3, 4, 4, 5, 5, 6, 6, 7, 7, 8, 8, 9, 9, 10, 10, 11, 11, 12, 12, 13, 13, 14, 14, 15, 15, 16, 16, 17, 17, 18, 18, 19, 19, 20, 20, 21, 21, 22, 22, 23, 23, 24, 24, 25, 25, 26, 26, 27, 27, 28, 28, 29, 29, 30, 30, 31, 31, 32, 32, 33, 33, 34, 34, 35, 35, 36, 36, 37, 37, 38, 38, 39, 39, 40, 40, 41, 41, 42, 42, 43, 43, 44, 44, 45, 45, 46, 46, 47, 47, 48, 48, 49, 49, 50, 50, 51, 51, 52, 52, 53, 53, 54, 54, 55, 55, 56, 56, 57, 57, 58, 58, 59, 59, 60, 60, 61, 61, 62, 62, 63, 63, 64, 64, 65, 65, 66, 66, 67, 67, 68, 68, 69, 69, 70, 70, 71, 71, 72, 72, 73, 73, 74, 74, 75, 75, 76, 76, 77,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}
        {0, 0, 1, 1, 2, 2, 3, 3, 4, 4, 5, 5, 6, 6, 7, 7, 8, 8, 9, 9, 10, 10, 11, 11, 12, 12, 13, 13, 14, 14, 15, 15, 16, 16, 17, 17, 18, 18, 19, 19, 20, 20, 21, 21, 22, 22, 23, 23, 24, 24, 25, 25, 26, 26, 27, 27, 28, 28, 29, 29, 30, 30, 31, 31}
        {1, 1}
      meshentityindexmap = 
        {0, 1, 2, 3, 4, 5, 6, 7, 8, 9, 10, 11, 12, 13, 14, 15, 16, 17, 18, 19, 20, 21, 22, 23, 24, 25, 26, 27, 28, 29, 30, 31, 32, 33, 34, 35, 36, 37, 38, 39, 40, 41, 42, 43, 44, 45, 46, 47, 48, 49, 50, 51, 52, 53, 54, 55, 56, 57, 58, 59, 60}
        {0, 1, 2, 3, 4, 5, 6, 7, 8, 9, 10, 11, 12, 13, 14, 15, 16, 17, 18, 19, 20, 21, 22, 23, 24, 25, 26, 27, 28, 29, 30, 31, 32, 33, 34, 35, 36, 37, 38, 39, 40, 41, 42, 43, 44, 45, 46, 47, 48, 49, 50, 51, 52, 53, 54, 55, 56, 57, 58, 59, 60, 61, 62, 63, 64, 65, 66, 67, 68, 69, 70, 71, 72, 73, 74, 75, 76, 77, 78, 79, 80, 81, 82, 83, 84, 85, 86, 87, 88, 89, 90}
        {0, 1, 2, 3, 4, 5, 6, 7, 8, 9, 10, 11, 12, 13, 14, 15, 16, 17, 18, 19, 20, 21, 22, 23, 24, 25, 26, 27, 28, 29, 30, 31}
        {1}
      selderived = on
    sca1: Scale | input = imp1; isotropic = 0.001; factor = 0.001
    rot1: Rotate | input = sca1; axistype = x; rot = 90
    mov1: Move | input = rot1; displx = -3.85[mm]; disply = 4[mm]; displz = 0
    wp1: WorkPlane | quickz = 0.0002; unite = on
    fin: Finalize "Form Union"
  mgeom1 "Mesh Geometry 1" [mcomp1] (3D, length unit m)
  mgeom2 "Mesh Geometry 2" [mcomp2] (3D, length unit m)
  mgeom3 "Mesh Geometry 3" [mcomp3] (3D, length unit m)
  geom2 "Geometry 2" [comp2] (2D, length unit m)
    cro1: CrossSection | workplane = wp1
    c1: Circle | r = 0.00015; pos = {-0.7[mm], -0.54[mm]}
    int1: Intersection | input = c1, cro1; keep = on
    r1: Rectangle | size = {0.002, 0.001}; base = center
    pol5: Polygon
      type = open
      source = table
      table = {{-7.55001068115e-05, 0.000334999799728}, {8.35000514984e-05, 0.000334999799728}}
    pol6: Polygon
      type = open
      source = table
      table = {{-0.000245999908447, -0.000335000038147}, {0.000254000091553, -0.000335000038147}}
    par1: Partition "Partition Objects 1" | input = r1; tool = cro1, r1; keepinput = on; keeptool = on
    del3: Delete "Delete Entities 3" | input = par1(1) domains 1
    del4: Delete "Delete Entities 4" | input = r1(1) boundaries 1-4
    pol7: Polygon
      type = open
      source = table
      table = {{0.00312092342377, -0.000334987163544}, {0.00312445774078, -0.000739971637726}}
    del5: Delete "Delete Entities 5" | input = pol6(1) boundaries 1
    fin: Finalize "Form Union"
  mgeom4 "Mesh Geometry 4" [mcomp4] (3D, length unit m)
  mgeom5 "Mesh Geometry 5" [mcomp5] (3D, length unit m)
  autodeform1 "Deformed Configuration 1" [comp2] (2D, length unit m)
    frommesh1: FromMesh "Deformed Configuration 1" | solution = sol2; t = 0.2
  autodeform2 "Deformed Configuration 2" [comp2] (2D, length unit m)
    frommesh2: FromMesh "Deformed Configuration 2" | solution = sol2; t = 0.2
  autodeform3 "Deformed Configuration 3" [comp2] (2D, length unit m)
    frommesh3: FromMesh "Deformed Configuration 3" | solution = sol2; t = 0.2
  autodeform4 "Deformed Configuration 4" [comp2] (2D, length unit m)
    frommesh4: FromMesh "Deformed Configuration 4" | solution = sol2; t = 0.2
  autodeform5 "Deformed Configuration 5" [comp2] (2D, length unit m)
    frommesh5: FromMesh "Deformed Configuration 5" | solution = sol2; t = 0.2
  autodeform6 "Deformed Configuration 6" [comp2] (2D, length unit m)
    frommesh6: FromMesh "Deformed Configuration 6" | solution = sol2; t = 0.2
  autodeform7 "Deformed Configuration 7" [comp2] (2D, length unit m)
    frommesh7: FromMesh "Deformed Configuration 7" | solution = sol2; t = 0.2
  autodeform8 "Deformed Configuration 8" [comp2] (2D, length unit m)
    frommesh8: FromMesh "Deformed Configuration 8" | solution = sol2; t = 0.2
  autodeform9 "Deformed Configuration 9" [comp2] (2D, length unit m)
    frommesh9: FromMesh "Deformed Configuration 9" | solution = sol2; t = 0.2
  autodeform10 "Deformed Configuration 10" [comp2] (2D, length unit m)
    frommesh10: FromMesh "Deformed Configuration 10" | solution = sol2; t = 0.2
  autodeform11 "Deformed Configuration 11" [comp2] (2D, length unit m)
    frommesh11: FromMesh "Deformed Configuration 11" | solution = sol2; t = 0.2
  autodeform12 "Deformed Configuration 12" [comp2] (2D, length unit m)
    frommesh12: FromMesh "Deformed Configuration 12" | solution = sol2; t = 0.2
  autodeform13 "Deformed Configuration 13" [comp2] (2D, length unit m)
    frommesh13: FromMesh "Deformed Configuration 13" | solution = sol2; t = 0.2
  autodeform14 "Deformed Configuration 14" [comp2] (2D, length unit m)
    frommesh14: FromMesh "Deformed Configuration 14" | solution = sol2; t = 0.2
  autodeform15 "Deformed Configuration 15" [comp2] (2D, length unit m)
    frommesh15: FromMesh "Deformed Configuration 15" | solution = sol2; t = 0.2
  autodeform16 "Deformed Configuration 16" [comp2] (2D, length unit m)
    frommesh16: FromMesh "Deformed Configuration 16" | solution = sol2; t = 0.2
  autodeform17 "Deformed Configuration 17" [comp2] (2D, length unit m)
    frommesh17: FromMesh "Deformed Configuration 17" | solution = sol2; t = 0.2
  autodeform21 "Deformed Configuration 21" [comp2] (2D, length unit m)
    frommesh21: FromMesh "Deformed Configuration 21" | solution = sol2; t = 0.2
  autodeform29 "Deformed Configuration 29" [comp2] (2D, length unit m)
    frommesh29: FromMesh "Deformed Configuration 29" | solution = sol2; t = 0.2
  autodeform30 "Deformed Configuration 30" [comp2] (2D, length unit m)
    frommesh30: FromMesh "Deformed Configuration 30" | solution = sol2; t = 0.2
  autodeform31 "Deformed Configuration 31" [comp2] (2D, length unit m)
    frommesh31: FromMesh "Deformed Configuration 31" | solution = sol2; t = 0.2

Materials
  mat1: Common "Water" [comp2] on selection sel1
    def: def "Basic"
      thermalexpansioncoefficient = alpha_p(T)
      bulkviscosity = muB(T)
      dynamicviscosity = eta(T)
      ratioofspecificheat = gamma_w(T)
      electricconductivity = 5.5e-6[S/m]
      heatcapacity = Cp(T)
      density = rho(T)
      thermalconductivity = k(T)
      soundspeed = cs(T)
      eta: Piecewise
        arg = T
        pieces = 
          {273.15, 413.15, 1.3799566804-0.021224019151*T^1+1.3604562827E-4*T^2-4.6454090319E-7*T^3+8.9042735735E-10*T^4-9.0790692686E-13*T^5+3.8457331488E-16*T^6}
          {413.15, 553.75, 0.00401235783-2.10746715E-5*T^1+3.85772275E-8*T^2-2.39730284E-11*T^3}
        argunit = K
        fununit = Pa*s
      Cp: Piecewise | arg = T; pieces = {273.15, 553.75, 12010.1471-80.4072879*T^1+0.309866854*T^2-5.38186884E-4*T^3+3.62536437E-7*T^4}; argunit = K; fununit = J/(kg*K)
      rho: Piecewise
        arg = T
        smooth = contd1
        pieces = 
          {273.15, 293.15, 6.3092789034e-05*T^3-0.0603676398829*T^2+18.9229382407066*T-950.704055329848}
          {293.15, 373.15, 1.0335053319e-05*T^3-0.0133950656345*T^2+4.96928883266*T+432.257114008512}
        argunit = K
        fununit = kg/m^3
      k: Piecewise | arg = T; pieces = {273.15, 553.75, -0.869083936+0.00894880345*T^1-1.58366345E-5*T^2+7.97543259E-9*T^3}; argunit = K; fununit = W/(m*K)
      cs: Interpolation
        funcnametable = {cs, 1}
        table = {{273, 1403}, {278, 1427}, {283, 1447}, {293, 1481}, {303, 1507}, {313, 1526}, {323, 1541}, {333, 1552}, {343, 1555}, {353, 1555}, {363, 1550}, {373, 1543}}
        interp = piecewisecubic
        fununit = m/s
        argunit = K
      an1: Analytic | funcname = alpha_p; expr = -1/rho(T)*d(rho(T),T); args = T; fununit = 1/K; argunit = K
      an2: Analytic | funcname = gamma_w; expr = 1+(T/Cp(T))*(alpha_p(T)*cs(T))^2; args = T; fununit = 1; argunit = K
      an3: Analytic | funcname = muB; expr = 2.79*eta(T); args = T; fununit = Pa*s; argunit = K
  mat2: Common "Liver (human)" [comp2] on selection sel3
    def: def "Basic"
      heatcapacity = 3540[J/(kg*K)]
      density = 1079[kg/m^3]
      thermalconductivity = 0.52[W/(m*K)]
      frequencyfactor = 7.39e39
      activationenergy = 2.577e5
    Enu: Enu "Young's modulus and Poisson's ratio"
      E = 7500
      nu = 0.4

Physics
  spf: LaminarFlow [geom2] on selection sel1
    dependent variable u = {u, v, w}
    PhysicalModelProperty.StokesFlowProp = 0
    PhysicalModelProperty.Compressibility = Incompressible
    PhysicalModelProperty.ShallowChannelProperty = 1
    PhysicalModelProperty.dz = 0.000356[m]
    TurbulenceModelProperty.TurbulenceModelType = None
    fp1: FluidProperties (default) | minput_temperature = 300[K]
    init1: init "Initial Values 1" (default)
    wallbc1: WallBC "Wall 1" (default) | BoundaryCondition = NoSlip
    inl1: InletBoundary "Inlet 1" on selection sel4
      BoundaryCondition = FullyDevelopedFlow
      FullyDevelopedFlowOption = V0
      V0fdf = 100 [µl/min]
      Dzfdf = 0.0004
      MassFlowType = StandardFlowRate
      stdmfr = 300 [µl/min]
      Dbnd = 0.0004[m]
      Mn = 0.01801528[kg/mol]
    out1: OutletBoundary "Outlet 1" on selection sel5
  solid: SolidMechanics [geom2] on domains 3-5
    dependent variable u_solid = {u_solid, v_solid, w_solid}
    ShapeProperty.order_displacement = 2
    d.d = 356[µm]
    lemm1: LinearElasticModel "Linear Elastic Material 1" (default) | MixedFormulation = pFormulation
    free1: Free (default)
    init1: init "Initial Values 1" (default)
    dcnt1: SolidContact "Contact 1" (default) | ContactMethodCtrl = Penalty; destination_offset = 1E-6; source_offset = 0
    fix1: Fixed "Encastrement 1" on domains 1-4

Multiphysics
  fsi1: FluidStructureInteractionBC "Fluid-Structure Interaction 1" [comp2] on boundaries 1-10, 12-18, 20-42
    CouplingType = FullyCoupled
    Fluid_physics = spf
    Structure_physics = solid

Mesh
  mpart1 "Mesh Part 1" [mgeom1]
    imp1: Import
      source = stl
      filename = S:\120-LETI\120.4-DTIS\120.4.12-SEMIV\120.4.12.6-PRISM\120.4.12.6.4-Montages de projets\TUM - CEA Leti collab\CEATUM_TrapBuilder_v1a.stl
    fin: Finalize
  mpart2 "Mesh Part 2" [mgeom2]
    imp1: Import
      source = stl
      filename = S:\120-LETI\120.4-DTIS\120.4.12-SEMIV\120.4.12.6-PRISM\120.4.12.6.4-Montages de projets\TUM - CEA Leti collab\Simulation\CEATUM_TrapBuilder_v1a_ChannelPositive.stl
    fin: Finalize
  mpart3 "Mesh Part 3" [mgeom3]
    imp1: Import
      source = stl
      filename = S:\120-LETI\120.4-DTIS\120.4.12-SEMIV\120.4.12.6-PRISM\120.4.12.6.4-Montages de projets\TUM - CEA Leti collab\Simulation\CEATUM_TrapBuilder_v1a_ChannelPositive.stl
      importupdatenum = 1
      stltolabs = 1.15e-07
      outsel_bnd = Boundaries Import 1
      tagsel_bnd = unnamed
    fin: Finalize
  mesh1 "Mesh 1" [geom2]
    size: MeshSizeDefault | hauto = 3
    dis1: Distribution on boundaries 27-30 | numelem = 50
    dis2: Distribution on boundaries 27-30 | numelem = 50
    size1: Size (disabled) on domains 3, 5 | hauto = 1
    size2: Size (disabled) on no boundaries | hmax = 5.16E-5; hgrad = 1.05; hauto = 1; hnarrow = 20
    cr1: CornerRefinement (disabled) on no domains
    ftri1: FreeTri "Free Triangular 1" on remaining entities | smoothmaxiter = 4; smoothmaxdepth = 4
      size1: Size on no points | hmax = 4.0E-6; hgrad = 1.05; hauto = 1; custom = on
      size2: Size on no points | hmax = 4E-7; hauto = 1; custom = on
    dis3: Distribution on no boundaries | numelem = 20
    dis4: Distribution on no boundaries | numelem = 20
    bl1: BndLayer "Boundary Layers 1" (disabled) on no domains
      sharpcorners = trim
      smoothmaxiter = 4
      smoothmaxdepth = 6
      blp1: BndLayerProp "Boundary Layer Properties 1" on boundaries 27-30 | blnlayers = 1
  errormesh1 "Maillage déformé problématique 1" [geom2]
  mpart4 "Mesh Part 4" [mgeom4]
    imp1: Import
      source = stl
      filename = C:\Users\PP170251\Documents\DTIS\Joris Kaal\simuls\simuls Pascale\2D refait\CEATUM_TrapBuilder_v1a_NewSTL.stl
      createdom = on
    fin: Finalize
  mpart5 "Mesh Part 5" [mgeom5]
    imp1: Import
      source = stl
      filename = C:\Users\PP170251\Documents\DTIS\Joris Kaal\simuls\simuls Pascale\2D refait\CEATUM_TrapBuilder_v1a_chip11.STL
      createdom = on
    fin: Finalize
  mesh2 "Mesh 2" [autodeform1]
    size: MeshSizeDefault | hmax = 5.36E-4; hmin = 2.4E-6; hcurve = 0.3; hgrad = 1.3
    ref1: Reference | sequence = mesh1
  mesh3 "Mesh 3" [autodeform2]
    size: MeshSizeDefault | hmax = 5.36E-4; hmin = 2.4E-6; hcurve = 0.3; hgrad = 1.3
    ref1: Reference | sequence = mesh1
  mesh4 "Mesh 4" [autodeform3]
    size: MeshSizeDefault | hmax = 5.36E-4; hmin = 2.4E-6; hcurve = 0.3; hgrad = 1.3
    ref1: Reference | sequence = mesh1
  mesh5 "Mesh 5" [autodeform4]
    size: MeshSizeDefault | hmax = 5.36E-4; hmin = 2.4E-6; hcurve = 0.3; hgrad = 1.3
    ref1: Reference | sequence = mesh1
  mesh6 "Mesh 6" [autodeform5]
    size: MeshSizeDefault | hmax = 5.36E-4; hmin = 2.4E-6; hcurve = 0.3; hgrad = 1.3
    ref1: Reference | sequence = mesh1
  mesh7 "Mesh 7" [autodeform6]
    size: MeshSizeDefault | hmax = 5.36E-4; hmin = 2.4E-6; hcurve = 0.3; hgrad = 1.3
    ref1: Reference | sequence = mesh1
  mesh8 "Mesh 8" [autodeform7]
    size: MeshSizeDefault | hmax = 5.36E-4; hmin = 2.4E-6; hcurve = 0.3; hgrad = 1.3
    ref1: Reference | sequence = mesh1
  mesh9 "Mesh 9" [autodeform8]
    size: MeshSizeDefault | hmax = 5.36E-4; hmin = 2.4E-6; hcurve = 0.3; hgrad = 1.3
    ref1: Reference | sequence = mesh1
  mesh10 "Mesh 10" [autodeform9]
    size: MeshSizeDefault | hmax = 5.36E-4; hmin = 2.4E-6; hcurve = 0.3; hgrad = 1.3
    ref1: Reference | sequence = mesh1
  mesh11 "Mesh 11" [autodeform10]
    size: MeshSizeDefault | hmax = 5.36E-4; hmin = 2.4E-6; hcurve = 0.3; hgrad = 1.3
    ref1: Reference | sequence = mesh1
  mesh12 "Mesh 12" [autodeform11]
    size: MeshSizeDefault | hmax = 5.36E-4; hmin = 2.4E-6; hcurve = 0.3; hgrad = 1.3
    ref1: Reference | sequence = mesh1
  mesh13 "Mesh 13" [autodeform12]
    size: MeshSizeDefault | hmax = 5.36E-4; hmin = 2.4E-6; hcurve = 0.3; hgrad = 1.3
    ref1: Reference | sequence = mesh1
  mesh14 "Mesh 14" [autodeform13]
    size: MeshSizeDefault | hmax = 5.36E-4; hmin = 2.4E-6; hcurve = 0.3; hgrad = 1.3
    ref1: Reference | sequence = mesh1
  mesh15 "Mesh 15" [autodeform14]
    size: MeshSizeDefault | hmax = 5.36E-4; hmin = 2.4E-6; hcurve = 0.3; hgrad = 1.3
    ref1: Reference | sequence = mesh1
  mesh16 "Mesh 16" [autodeform15]
    size: MeshSizeDefault | hmax = 5.36E-4; hmin = 2.4E-6; hcurve = 0.3; hgrad = 1.3
    ref1: Reference | sequence = mesh1
  mesh17 "Mesh 17" [autodeform16]
    size: MeshSizeDefault | hmax = 5.36E-4; hmin = 2.4E-6; hcurve = 0.3; hgrad = 1.3
    ref1: Reference | sequence = mesh1
  mesh18 "Mesh 18" [autodeform17]
    size: MeshSizeDefault | hmax = 5.36E-4; hmin = 2.4E-6; hcurve = 0.3; hgrad = 1.3
    ref1: Reference | sequence = mesh1
  mesh19 "Mesh 19" [autodeform21]
    size: MeshSizeDefault | hmax = 5.36E-4; hmin = 2.4E-6; hcurve = 0.3; hgrad = 1.3
    ref1: Reference | sequence = mesh1
  mesh20 "Mesh 20" [autodeform29]
    size: MeshSizeDefault | hmax = 5.36E-4; hmin = 2.4E-6; hcurve = 0.3; hgrad = 1.3
    ref1: Reference | sequence = mesh1
  mesh21 "Mesh 21" [autodeform30]
    size: MeshSizeDefault | hmax = 5.36E-4; hmin = 2.4E-6; hcurve = 0.3; hgrad = 1.3
    ref1: Reference | sequence = mesh1
  mesh22 "Mesh 22" [autodeform31]
    size: MeshSizeDefault | hmax = 5.36E-4; hmin = 2.4E-6; hcurve = 0.3; hgrad = 1.3
    ref1: Reference | sequence = mesh1

Studies
  std1 "Study statique"
    stat: Stationary | solve for = {spf}; activateCoupling = {fsi1, off}; mesh = {geom1, nomesh, geom2, mesh1}
  std2 "Study transitoire"
    time: Transient "Time Dependent"
      tlist = range(0,0.005,0.2)
      useinitsol = on
      initmethod = sol
      initstudy = std1
      usesol = on
      notsolmethod = sol
      notstudy = std1
      mesh = {geom1, nomesh, geom2, mesh1}
      timeadapgeom = geom2
      autoremeshgeom = geom2

Solver configurations
  sol1 "Solution 1" (study std1)
    v1: Variables "Variables dépendantes 1"
      comp2_solid_lemm1_pw: Field "Auxiliary pressure (comp2.solid.lemm1.pw)" | scalemethod = manual; scaleval = 100000000
      comp2_spatial_disp: Field "Spatial mesh displacement (comp2.spatial.disp)"
        scalemethod = manual
        scaleval = 1e-2*0.011133508132
      comp2_u_solid: Field "Displacement field (comp2.u_solid)" | scalemethod = manual; scaleval = 1e-2*0.011133508132
    s1: Stationary "Solveur stationnaire 1"
      dDef: Direct
      se1: Segregated "Ségrégé 1"
        maxsegiter = 200
        segstabacc = segcflcmp
        subkipid = 0.15
        subkdpid = 0.15
        segcflaa = on
        segcflaacfl = 9000
        segcflaafact = 1
        ss1: SegregatedStep "Vitesse u, pression p"
          segvar = {comp2_p, comp2_u, comp2_spf_inl1_Pinlfdf}
          linsolver = dDef
          subdtech = ddog
          subdamp = 0.5
          subiter = 7
          subtermauto = itertol
          subntolfact = 1
        ss2: SegregatedStep "Vitesse u, pression p (2)" | linsolver = dDef; subdamp = 0.5
        ss3: SegregatedStep "Champ de déplacement"
          segvar = {comp2_u_solid, comp2_solid_lemm1_pw}
          linsolver = dDef
          subdamp = 0.5
        ss4: SegregatedStep "Déplacement du maillage spatial"
          segvar = {comp2_spatial_disp}
          linsolver = d1
          subdamp = 0.5
          subntolfact = 0.1
      d1: Direct "Direct, déplacement du maillage spatial (spf)" | linsolver = pardiso; pivotperturb = 1.0E-13
  sol2 "Solution 2" (study std2)
    v1: Variables "Dependent Variables 1"
      comp2_solid_lemm1_pw: Field "Auxiliary Pressure (comp2.solid.lemm1.pw)" | scalemethod = manual; scaleval = 100000000
      comp2_spatial_disp: Field "Spatial Mesh Displacement (comp2.spatial.disp)"
        scalemethod = manual
        scaleval = 1e-2*0.011133508132
      comp2_u_solid: Field "Displacement Field (comp2.u_solid)" | scalemethod = manual; scaleval = 1e-2*0.011133508132
    t1: Time "Time-Dependent Solver 1"
      tlist = range(0,0.005,0.2)
      rtol = 0.001
      atolglobalfactor = 0.05
      atolmethod = {comp2_p, scaled, comp2_solid_lemm1_pw, global, comp2_spatial_disp, global, comp2_u, global, comp2_u_solid, global, comp2_spf_inl1_Pinlfdf, global, comp2_fsi1_vWall, global, comp2_XgYg, global}
      atolvaluemethod = {comp2_p, factor, comp2_solid_lemm1_pw, factor, comp2_spatial_disp, factor, comp2_u, factor, comp2_u_solid, factor, comp2_spf_inl1_Pinlfdf, factor, comp2_fsi1_vWall, factor, comp2_XgYg, factor}
      atolfactor = {comp2_p, 1, comp2_solid_lemm1_pw, 0.1, comp2_spatial_disp, 0.1, comp2_u, 0.1, comp2_u_solid, 0.1, comp2_spf_inl1_Pinlfdf, 0.1, comp2_fsi1_vWall, 0.1, comp2_XgYg, 0.1}
      initialstepbdf = 0.0001
      maxorder = 2
      timestepbdf = 0.00001
      stabcntrl = on
      bwinitstepfrac = 0.01
      estrat = exclude
      rhoinf = 0.5
      predictor = constant
      d2: Direct "Direct, spatial mesh displacement" | linsolver = pardiso; pivotperturb = 1.0E-13
      fc1: FullyCoupled | linsolver = d2; dtech = hnlin; jtech = onevery; initsteph = 0.5
      ar1: AutoRemesh "Automatic Remeshing 1"
        stopval = 0.1
        remeshtimes = range(0,0.03,0.2)
        remeshtimestep = 20
        consistentremesh = bweuler
  sol3 "Remeshed Solution 1" (study std2)
  sol4 "Refined Mesh Solution 1" (study std2)

Datasets
  dset1: Solution | solution = sol1
  dset2: Solution | solution = sol2
  dset3: Solution | solution = sol3
  dset4: Solution | solution = sol4
  cln1: CutLine2D "Cut Line 2D 1 (Trap)" | data = dset3; genpoints = {{-7.550010681E-5, 0.0003}, {8.35000515E-5, 0.0003}}
  cln2: CutLine2D "Cut Line 2D 2 (Channel)" | data = dset3; genpoints = {{0.0015, 0.0002}, {0.0015, 0.0008}}
  cln3: CutLine2D "Cut Line 2D 3 (Total)" | data = dset3; genpoints = {{-0.0015, 0.0002}, {-0.0015, 0.0008}}
  cln4: CutLine2D "Cut Line 2D 4 (Entrance)" | data = dset3; genpoints = {{-0.0015, -0.0002}, {-0.0015, -0.0008}}
  cln5: CutLine2D "Cut Line 2D 5 (Curve)" | data = dset3; genpoints = {{0.003, 0}, {0.004, 0}}

Derived values
  int1: IntLine "Line Integration 1 (Qb)" | data = cln1; table = tbl1; expr = v*0.000356*60*10^9; descr = Qb
  int2: IntLine "Line Integration 2 (Qa)" | data = cln2; table = tbl1; expr = -u*0.000356*60*10^9; descr = Qa
  int3: IntLine "Line Integration 3 (Qtot)" | data = cln3; table = tbl1; expr = -u*0.000356*60*10^9; descr = Qtot

Tables
  tbl1: Table "Table with Qa, Qb and Qtot"
    // Line Integration 1 (Qb)
    Time (s) | Qb (m^2/s) | Qa (m^2/s) | Qtot (m^2/s)
    0 | 57.2242 | 26.2457 | 84.1708
    0.005 | 70.6351 | 22.9617 | 91.733
    0.0060348 | 71.6444 | 22.4277 | 91.852
    0.0060348 | 70.0644 | 22.4277 | 91.852
    0.01 | 73.2759 | 20.5675 | 89.177
    0.0113068 | 73.3852 | 20.3121 | 89.112
    0.0113068 | 71.2916 | 20.3121 | 89.112
    0.015 | 74.1401 | 19.853 | 89.3139
    0.0161496 | 74.1241 | 19.7581 | 89.277
    0.0161496 | 72.0037 | 19.7581 | 89.277
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  tbl2: Table
    // Line Integration 3 (Qtot)
    Qtot (m^2/s)
    0

Plots
  pg10: PlotGroup2D "V statique" | data = dset1
    surf1: Surface | expr = spf.U; unit = mm/s
  pg2: PlotGroup2D "Pressure (spf)" | data = dset1
    con1: Contour | expr = p; levelrounding = off
  pg11: PlotGroup2D "Velocity (spf)" | data = dset3; title = Flow velocity field; xlabel = x; ylabel = y
    surf1: Surface | expr = spf.U; unit = mm/min
  pg12: PlotGroup2D "Pressure (spf) 1" | data = dset3
    con1: Contour | expr = p; levelrounding = off
  pg13: PlotGroup2D "Stress (solid)" | data = dset3
    surf1: Surface | expr = solid.misesGp
  pg14: PlotGroup2D "Moving Mesh" | data = dset3
    mesh1: Mesh | qualmeasure = custom; qualexpr = comp2.spatial.relVol
      sel1: MeshSelection "Selection 1" on domains 1-5

Exports
  data1: Data "Data 1 (Trap)"
    data = cln1
    expr = v
    filename = /home/jk270454/ComsolTumTrapBuilder/TrapProfile10.txt
    includenan = off
  data2: Data "Data 1 (Trap) 1"
    data = cln1
    expr = v
    filename = /home/jk270454/ComsolTumTrapBuilder/TrapProfile100.txt
    includenan = off
  data3: Data "Data 1 (Trap) 1.1"
    data = cln1
    expr = v
    filename = /home/jk270454/ComsolTumTrapBuilder/TrapProfile200.txt
    includenan = off
  data4: Data "Data 1 (Channel)"
    data = cln2
    expr = -u
    filename = /home/jk270454/ComsolTumTrapBuilder/ChannelProfile10.txt
  data5: Data "Data 1 (Channel) 1"
    data = cln2
    expr = -u
    filename = /home/jk270454/ComsolTumTrapBuilder/ChannelProfile100.txt
  data6: Data "Data 1 (Channel) 1.1"
    data = cln2
    expr = -u
    filename = /home/jk270454/ComsolTumTrapBuilder/ChannelProfile200.txt
  data7: Data "Data 1 (Total)" | data = cln3; expr = -u; filename = /home/jk270454/ComsolTumTrapBuilder/TotalProfile10.txt
  data8: Data "Data 1 (Total) 1"
    data = cln3
    expr = -u
    filename = /home/jk270454/ComsolTumTrapBuilder/TotalProfile100.txt
  data9: Data "Data 1 (Total) 1.1"
    data = cln3
    expr = -u
    filename = /home/jk270454/ComsolTumTrapBuilder/TotalProfile200.txt
  data10: Data "Data 1 (Entrance)"
    data = cln4
    expr = u
    filename = /home/jk270454/ComsolTumTrapBuilder/EntranceProfile10.txt
  data11: Data "Data 1 (Entrance) 1"
    data = cln4
    expr = u
    filename = /home/jk270454/ComsolTumTrapBuilder/EntranceProfile100.txt
  data12: Data "Data 1 (Entrance) 1.1"
    data = cln4
    expr = u
    filename = /home/jk270454/ComsolTumTrapBuilder/EntranceProfile200.txt
  data13: Data "Data 1 (Curve)" | data = cln5; expr = v; filename = /home/jk270454/ComsolTumTrapBuilder/CurveProfile10.txt
  data14: Data "Data 1 (Curve) 1"
    data = cln5
    expr = v
    filename = /home/jk270454/ComsolTumTrapBuilder/CurveProfile100.txt
  data15: Data "Data 1 (Curve) 1.1"
    data = cln5
    expr = v
    filename = /home/jk270454/ComsolTumTrapBuilder/CurveProfile200.txt